*Heading
** Job name: Test Model name: Model-1
** Generated by: Abaqus/CAE 2022
*Preprint, echo=YES, model=NO, history=NO, contact=NO
**
** PARTS
**
*Part, name=Part-1
*Node
1,          15.,          10.,0.819999995
2,          15.,   8.96000004,0.819999995
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*Element, type=C3D8H
  1,  31,  32,  42,  41,   1,   2,  12,  11
  2,  32,  33,  43,  42,   2,   3,  13,  12
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*Nset, nset=load_x, generate
  1,  30,   1
*Elset, elset=load_x, generate
  1,  18,   1
*Nset, nset=loady, generate
   1,  321,   10
*Elset, elset=loady, generate
   1,  172,    9
*Nset, nset=BCx, generate
 301,  330,    1
*Elset, elset=BCx, generate
 163,  180,    1
*Nset, nset=BCy, generate
  10,  330,   10
*Elset, elset=BCy, generate
   9,  180,    9
*Nset, nset=BCz
  21,  22,  23,  24,  25,  26
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*Elset, elset=BCz
  10,  11,  12,  13,  14,  15
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*Nset, nset=Whole_part, generate
   1,  330,    1
*Elset, elset=Whole_part, generate
   1,  180,    1
** Section: Sample
*parameter
 Pi = 3.141592654
 gamma = 60
 theta1 = gamma - 90
 c1 = cos(theta1*Pi/180)
 s1 = sin(theta1*Pi/180)
 theta2 = theta1-2*gamma
 c2 = cos(theta2*Pi/180)
 s2 = sin(theta2*Pi/180+1)
*orientation,name=ori-1,local directions=2
 1.0,0.0,0.0,0.0,1.0,0.0
 3,0.0
 <c1>, <s1>, 0.0
 <c2>, <s2>, 0.0
*Solid Section, elset=Whole_part, material=HGO_model, orientation=ori-1
1.,
*End Part
**
**
** ASSEMBLY
**
*Assembly, name=Assembly
**
*Instance, name=Part-1-1, part=Part-1
*End Instance
**
*End Assembly
**
** MATERIALS
**
*Material, name=HGO_model
*density
1.0e-4
*Anisotropic Hyperelastic, holzapfel, local direction=2
 3.96,    0., 41.84,  3.83,  0.26
**
** BOUNDARY CONDITIONS
**
** Name: BC-x Type: Symmetry/Antisymmetry/Encastre
*Boundary
Part-1-1.BCx, XSYMM
** Name: BC-y Type: Symmetry/Antisymmetry/Encastre
*Boundary
Part-1-1.BCy, YSYMM
** Name: BC-z Type: Symmetry/Antisymmetry/Encastre
*Boundary
Part-1-1.BCz, ZSYMM
** ----------------------------------------------------------------
**
** STEP: Load
**
*Step, name=Load, nlgeom=YES
*Static
0.01, 1., 1e-06, 0.1
**
** BOUNDARY CONDITIONS
**
** Name: Loadx Type: Displacement/Rotation
*Boundary
Part-1-1.load_x, 1, 1, 20.
** Name: Loady Type: Displacement/Rotation
*Boundary
Part-1-1.loady, 2, 2, 20.
**
** OUTPUT REQUESTS
**
*Restart, write, frequency=0
**
** FIELD OUTPUT: F-Output-1
**
*Output, field, variable=PRESELECT
**
** HISTORY OUTPUT: H-Output-1
**
*Output, history
*Element Output, elset=Part-1-1.load_x
E11, E22, MISES, S11, S22
**
** HISTORY OUTPUT: H-Output-1
**
*Output, history
*Element Output, elset=Part-1-1.load_x
E11, E22, MISES, S11, S22
**
** HISTORY OUTPUT: H-Output-y
**
*Element Output, elset=Part-1-1.loady
E11, E22, MISES, S11, S22
**
** HISTORY OUTPUT: H-Output-3
**
*Output, history, variable=PRESELECT
*End Step
